# OpenSim document version 40000
MarkerSet:
  Marker RACR: torso (-0.003 0.425 0.13)
  Marker LACR: torso (-0.003 0.425 -0.13)
  Marker C7: torso (-0.085 0.435 0.00165426)
  Marker CLAV: torso (0.04 0.38 0.017)
  Marker RASH: torso (0.05 0.3715 0.17)
  Marker RPSH: torso (-0.05 0.3715 0.17)
  Marker LASH: torso (0.05 0.3715 -0.17)
  Marker LPSH: torso (-0.058 0.3715 -0.17)
  Marker RSJC: humerus_r (0 0 0)
  Marker RUA1: humerus_r (0 -0.05 0.02)
  Marker RUA2: humerus_r (0 -0.2 0.02)
  Marker RUA3: humerus_r (0.03 -0.13 0.02)
  Marker RLEL: humerus_r (0.015 -0.28 0.04)
  Marker RMEL: humerus_r (0.00225 -0.286 -0.046)
  Marker RFAsuperior: ulna_r (0.00460453 -0.0800579 0.0453196)
  Marker RFAradius: radius_r (0.0005 -0.225 0.05)
  Marker RFAulna: radius_r (-0.022 -0.225 -0.022)
  Marker RASI: pelvis (0.00953047 0.0180816 0.128464)
  Marker LASI: pelvis (0.00953047 0.0180816 -0.128464)
  Marker RPSI: pelvis (-0.155 0.035 0.045)
  Marker LPSI: pelvis (-0.155 0.035 -0.045)
  Marker RHJC: femur_r (0 0 0)
  Marker RTH1: femur_r (0.018 -0.15 0.064)
  Marker RTH2: femur_r (0.08 -0.23 0.0047)
  Marker RTH3: femur_r (0.01 -0.3 0.06)
  Marker RLFC: femur_r (0 -0.404 0.05)
  Marker RMFC: femur_r (0 -0.404 -0.05)
  Marker RKJC: tibia_r (0.001731 -0.002389 -0.008452)
  Marker RTB1: tibia_r (-0.00166178 -0.156488 0.0492394)
  Marker RTB2: tibia_r (0.0369643 -0.230107 -0.00391699)
  Marker RTB3: tibia_r (0.0113793 -0.295236 0.0553541)
  Marker RLMAL: tibia_r (-0.005 -0.3888 0.053)
  Marker RMMAL: tibia_r (0.006 -0.3888 -0.038)
  Marker RAJC: talus_r (0 0 0)
  Marker RCAL: calcn_r (-0.025 0.02 -0.005)
  Marker RTOE: calcn_r (0.205 0.0297308 -0.03)
  Marker RMT5: calcn_r (0.145 0.02491 0.059)
  Marker REJC: ulna_r (0 0 0)
  Marker R_tibial_plateau: tibia_r (-0.00808954 -0.017 -0.00148474)
  Marker T10: torso (-0.0970569 0.2044073 -0.0003788937)
  Marker SACR: torso (-0.07255996 -0.09954414 0.0004675744)
  Marker NAVE: torso (0.1444045 0.06881671 -0.01743862)
  Marker XYPH: torso (0.1062357 0.2126953 0.002500832)
  Marker RGTRO: femur_r (-0.019452 -0.02823746 0.07689769)
  Marker LGTRO: femur_l (-0.019452 -0.02823746 -0.07689769)
